// SBML level 2 version 4
// This model was downloaded from BioModels Database
// http://www.ebi.ac.uk/biomodels-static/

model Rohwer2001_Sucrose()
  // SBML Level 2 code generated for the JWS Online project by Jacky Snoep using PySCeS .
  // Run this model online at http://jjj.biochem.sun.ac.za .
  // To cite JWS Online please refer to: Olivier, B.G. and Snoep, J.L. (2004) Web-based modelling using JWS Online , Bioinformatics, 20:2143-2144.
  // This model originates from BioModels Database: A Database of Annotated Published Models. It is copyright (c) 2005-2010 The BioModels Team.
  // For more information see the terms of use .
  // To cite BioModels Database, please use Le Novère N., Bornstein B., Broicher A., Courtot M., Donizelli M., Dharuri H., Li L., Sauro H., Schilstra M., Shapiro B., Snoep J.L., Hucka M. (2006) BioModels Database: A Free, Centralized Database of Curated, Published, Quantitative Kinetic Models of Biochemical and Cellular Systems Nucleic Acids Res., 34: D689-D691.
  // To the extent possible under law, all copyright and related or neighbouring rights to this encoded model have been dedicated to the public domain worldwide. Please refer to CC0 Public Domain Dedication for more information.
  // In summary, you are entitled to use this encoded model in absolutely any manner you deem suitable, verbatim, or with modification, alone or embedded it in a larger context, redistribute it, commercially or not, in a restricted way or not.
  // biomodels.db:MODEL6618063111
  // biomodels.db:BIOMD0000000023
  // isDescribedBy pubmed:11513743
  // hasTaxon taxonomy:4547
  // isVersionOf GO:0005986
  // kegg.pathway:map00500

  // Compartments:
  compartment compartment = 1; compartment is "cell";  // GO:0005623

  // Species:
  species Fru in compartment = 1;  // CHEBI:15824 kegg.compound:C00095
  species Glc in compartment = 1;  // CHEBI:17634 kegg.compound:C00031
  species HexP in compartment = 1;  // hasVersion CHEBI:16218 CHEBI:15946 CHEBI:14314; hasVersion kegg.compound:C00029 kegg.compound:C00668 kegg.compound:C00085 kegg.compound:C00103
  species Suc6P in compartment = 1;  // CHEBI:16308 kegg.compound:C02591
  species Suc in compartment = 1;  // CHEBI:17992 kegg.compound:C00089
  species $Sucvac in compartment = 0;  // CHEBI:17992 kegg.compound:C00089
  species $glycolysis in compartment = 0;  // kegg.compound:C05378 CHEBI:28013
  species $phos in compartment = 5.1;  // CHEBI:18367 kegg.compound:C00009
  species $UDP in compartment = 0.2;  // CHEBI:17659 kegg.compound:C00015
  species $ADP in compartment = 0.2;  // CHEBI:16761 kegg.compound:C00008
  species $ATP in compartment = 1;  // CHEBI:15422 kegg.compound:C00002
  species $Glcex in compartment = 5;  // CHEBI:17634 kegg.compound:C00031
  species $Fruex in compartment = 5;  // CHEBI:15824 kegg.compound:C00095

  // Reactions:
  v1: $Fruex -> Fru; compartment*(Vmax1*Fruex/(Km1Fruex*(1 + Fru/Ki1Fru) + Fruex));  // isVersionOf GO:0015755
    Vmax1 = 0.286; Km1Fruex = 0.2; Ki1Fru = 1;
  v2: $Glcex -> Glc; compartment*(Vmax2*Glcex/(Km2Glcex*(1 + Glc/Ki2Glc) + Glcex));  // isVersionOf GO:0015758
    Vmax2 = 0.286; Km2Glcex = 0.2; Ki2Glc = 1;
  v3: $ATP + Glc -> HexP + $ADP; compartment*(Vmax3*(Glc/v3_Km3Glc)*(ATP/Km3ATP)/((1 + ATP/Km3ATP)*(1 + Glc/v3_Km3Glc + Fru/v3_Km4Fru + 0.113*HexP/v3_Ki3G6P + 0.0575*HexP/v3_Ki4F6P)));  // modifiers: Fru; isVersionOf ec-code:2.7.1.2; kegg.reaction:R00299
    Vmax3 = 0.197; v3_Km3Glc = 0.07; Km3ATP = 0.25; v3_Km4Fru = 10; v3_Ki3G6P = 0.1; v3_Ki4F6P = 10;
  v4: Fru + $ATP -> HexP + $ADP; compartment*(Vmax4*(Fru/v4_Km4Fru)*(ATP/Km4ATP)/((1 + ATP/Km4ATP)*(1 + Glc/v4_Km3Glc + Fru/v4_Km4Fru + 0.113*HexP/v4_Ki3G6P + 0.0575*HexP/v4_Ki4F6P)));  // modifiers: Glc; isVersionOf ec-code:2.7.1.4; kegg.reaction:R03920 kegg.reaction:R00760
    Vmax4 = 0.197; v4_Km4Fru = 10; Km4ATP = 0.25; v4_Km3Glc = 0.07; v4_Ki3G6P = 0.1; v4_Ki4F6P = 10;
  v5: Fru + $ATP -> HexP + $ADP; compartment*(Vmax5/(1 + Fru/Ki5Fru)*(Fru/Km5Fru)*(ATP/Km5ATP)/(1 + Fru/Km5Fru + ATP/Km5ATP + Fru*ATP/(Km5Fru*Km5ATP) + ADP/Ki5ADP));  // isVersionOf ec-code:2.7.1.4; kegg.reaction:R00760
    Vmax5 = 0.164; Ki5Fru = 12; Km5Fru = 0.1; Km5ATP = 0.085; Ki5ADP = 2;
  v6: 2 HexP -> $UDP + Suc6P; compartment*(Vmax6f*(0.0575*HexP*0.8231*HexP - Suc6P*UDP/Keq6)/(0.0575*HexP*0.8231*HexP*(1 + Suc6P/Ki6Suc6P) + Km6F6P*(1 + phos/Ki6Pi)*(0.8231*HexP + Ki6UDPGlc) + Km6UDPGlc*0.0575*HexP + Vmax6f/(Vmax6r*Keq6)*(Km6UDP*Suc6P*(1 + 0.8231*HexP/Ki6UDPGlc) + UDP*(Km6Suc6P*(1 + Km6UDPGlc*0.0575*HexP/(Ki6UDPGlc*Km6F6P*(1 + phos/Ki6Pi))) + Suc6P*(1 + 0.0575*HexP/Ki6F6P)))));  // modifiers: phos; isVersionOf ec-code:2.4.1.14; kegg.reaction:R00766
    Vmax6f = 0.379; Keq6 = 10; Ki6Suc6P = 0.07; Km6F6P = 0.6; Ki6Pi = 3; Ki6UDPGlc = 1.4; Km6UDPGlc = 1.8; Vmax6r = 0.2; Km6UDP = 0.3; Km6Suc6P = 0.1; Ki6F6P = 0.4;
  v7: Suc6P -> Suc + $phos; compartment*(Vmax7*Suc6P/(Km7Suc6P + Suc6P));  // isVersionOf ec-code:3.1.3.24; kegg.reaction:R00805
    Vmax7 = 0.5; Km7Suc6P = 0.1;
  v8: HexP + Fru -> Suc + $UDP; compartment*(-Vmax8f*(Suc*UDP - Fru*0.8231*HexP/Keq8)/(Suc*UDP*(1 + Fru/Ki8Fru) + Km8Suc*(UDP + Ki8UDP) + Km8UDP*Suc + Vmax8f/(Vmax8r*Keq8)*(Km8UDPGlc*Fru*(1 + UDP/Ki8UDP) + 0.8231*HexP*(Km8Fru*(1 + Km8UDP*Suc/(Ki8UDP*Km8Suc)) + Fru*(1 + Suc/Ki8Suc)))));  // isVersionOf ec-code:2.4.1.13; kegg.reaction:R00806
    Vmax8f = 0.677; Keq8 = 5; Ki8Fru = 4; Km8Suc = 50; Ki8UDP = 0.3; Km8UDP = 0.3; Vmax8r = 0.3; Km8UDPGlc = 0.3; Km8Fru = 4; Ki8Suc = 40;
  v9: Suc -> Fru + Glc; compartment*(Vmax9/(1 + Glc/Ki9Glc)*Suc/(Km9Suc*(1 + Fru/Ki9Fru) + Suc));  // isVersionOf ec-code:3.2.1.26 ec-code:3.2.1.48 ec-code:3.2.1.20; kegg.reaction:R00802
    Vmax9 = 0.372; Ki9Glc = 15; Km9Suc = 10; Ki9Fru = 15;
  v10: HexP -> $glycolysis; compartment*(Vmax10*0.0575*HexP/(Km10F6P + 0.0575*HexP));  // isVersionOf GO:0006096
    Vmax10 = 0.1; Km10F6P = 0.2;
  v11: Suc -> $Sucvac; compartment*(Vmax11*Suc/(Km11Suc + Suc));  // isVersionOf GO:0015770
    Vmax11 = 1; Km11Suc = 100;

  // Unit definitions:
  unit substance = 1e-3 mole; substance is "millimole (default)";
  unit time = 60 second; time is "minute (default)";
end
