// SBML level 3 version 1

function KL_12398(A, kcatdivKm, kcat, Km)
  NaN;
end

model SABIOmdl08Oct2018432()
  // This model has been created with the help of the SABIO-RK Database (http://sabio.h-its.org/) (c) 2005-2018 HITS gGmbH http://www.h-its.org
  // To cite SABIO-RK Database, please use "http://www.ncbi.nlm.nih.gov/pubmed/22102587"
  // SABIO-RK - database for biochemical reaction kinetics. Wittig U, Kania R, Golebiewski M, Rey M, Shi L, Jong L, Algaa E, Weidemann A, Sauer-Danzwith H, Mir S, Krebs O, Bittkowski M, Wetsch E, Rojas I, Mueller W. Nucleic Acids Res. 2012;40(Database issue)790-6

  // Compartments:
  compartment compart_Cell;

  // Species:
  species SPC_37_Cell in compart_Cell = 1; SPC_37_Cell is "NAD+";  // CHEBI:13389 CHEBI:15846 CHEBI:44215 kegg.compound:C00003
  species SPC_2277_Cell in compart_Cell = 1; SPC_2277_Cell is "Glycol";  // CHEBI:30742 kegg.compound:C01380 kegg.compound:C15588
  species SPC_2004_Cell in compart_Cell = 1; SPC_2004_Cell is "Glycolaldehyde";  // CHEBI:17071 kegg.compound:C00266
  species SPC_38_Cell in compart_Cell = 1; SPC_38_Cell is "NADH";  // CHEBI:16908 kegg.compound:C00004
  species ENZ_64210_Cell in compart_Cell = 1; ENZ_64210_Cell is "alcohol dehydrogenase(Enzyme) wildtype class II pi chain";  // uniprot:P08319

  // Reactions:
  REAC_0: SPC_37_Cell + SPC_2277_Cell -> SPC_2004_Cell + SPC_38_Cell; KL_12398(SPC_37_Cell, kcatdivKm_SPC_2277_Cell, kcat, Km_SPC_2277_Cell);  // modifiers: ENZ_64210_Cell; isVersionOf ec-code:1.1.1.1; kegg.reaction:R01781; hasTaxon taxonomy:9606; sabiork.reaction:1874
    kcatdivKm_SPC_2277_Cell = 3.33333333 Mwedgeoneswedgeone; kcat = 0.75 swedgeone; Km_SPC_2277_Cell = 0.29 M;

  // Unit definitions:
  unit Mwedgeoneswedgeone = litre / (mole * second); Mwedgeoneswedgeone is "M^(-1)*s^(-1)";
  unit swedgeone = 1 / second; swedgeone is "s^(-1)";
  unit M = mole / litre;
end
